Num := 200
i := 0 .. Num
j := 0 .. Num
DATA1 := READPRN("./An_Ey_out.txt")  # error: 无法打开数据文件。
Ex[i, j] := DATA1[:, 0][i*(Num + 1) + j] + 1i*DATA1[:, 1][i*(Num + 1) + j]
absEx[i, j] := |Ex[i, j]|
PhsEx[i, j] := arg(Ex[i, j] + 0.00001)
Ex[100, 100] =  # error: 该变量未定义。
DATA2 := READPRN("./Ez_out.txt")
Ey[i, j] := DATA2[:, 0][i*(Num + 1) + j] + 1i*DATA2[:, 1][i*(Num + 1) + j]
DATA1 =  # error
absEy[i, j] := |Ey[i, j]|
PhsEy[i, j] := arg(Ey[i, j] + 0.000001)
logabsEz[i, j] := 20*log(absEy[i, j])
Ey[100, 100] = -0.0242509 + 0.00665081i
DATA3 := READPRN("./Ez2_M.txt")
Ez[i, j] := DATA3[:, 0][i*(Num + 1) + j] + 1i*DATA3[:, 1][i*(Num + 1) + j]
absEz[i, j] := |Ez[i, j]|
PhsEz[i, j] := arg(Ez[i, j] + 0.00001)
Ez[100, 100] = -0.00667745 - 0.0178569i
DATA4 := READPRN("./FEKO_out.txt")  # error: 无法打开数据文件。
absFEz[i, j] := DATA4[:, 8][j*(Num + 1) + i]
logabsFEz[i, j] := 20*log(absFEz[i, j])
# [component: inputs PhsEx]
# [component: inputs absEy]
# [component: inputs absEz]
ds := 0.0025
C := 3*10^8
f := 10*10^9
λ := C/f
P1[i] := i*ds/sqrt(3)
Phsp[i] := P1[i]/λ*2*3.1415926 + 1.5
Ep[i] := e^(1i*Phsp[i])
PhsEp[i] := arg(Ep[i])
sPhsEy[i, j] := PhsEy[i, j]*180/3.1415926
sPhsEx[i, j] := PhsEx[i, j]*180/3.1415926
sPhsEz[i, j] := PhsEz[i, j]*180/3.1415926
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